// SBML level 2 version 4

function Function_for_Efflux(PCS_C, Km_Efflux, Mem, Vmax_Efflux)
  Vmax_Efflux*PCS_C*(1/(Km_Efflux + PCS_C))*Mem;
end

function Function_for_Uptake(PCS_B, PCS_OAT1, Kf_Uptake, Kr_Uptake, Mem, OAT1)
  (Kf_Uptake*OAT1*PCS_B + (-(Kr_Uptake*PCS_OAT1)))*Mem;
end

function Function_for_dissociation(PCS_C, PCS_OAT1, Kf_dissociation, Kr_dissociation, Mem, OAT1)
  (Kf_dissociation*PCS_OAT1 + (-(Kr_dissociation*OAT1*PCS_C)))*Mem;
end

model _0D_PCS_fit_0D()
  // 0D_PCS_fit_0D

  // Compartments:
  compartment Cell_Monolayer = 3.2e-7;
  compartment Well = 0.0001;
  compartment Mem = 0.0032;  // 2-D

  // Species:
  species PCS_B in Well = 10;
  species OAT1 in Mem = 1e-5*11500000*KMOLE;
  species PCS_C in Cell_Monolayer = 0;
  species PCS_OAT1 in Mem = 0;

  // Parameters:
  Vmax = 10 unit_0;
  v_u = 1;
  v_b = 0.5;
  v_u_new = 0.3;
  width = 30 unit_1;
  L = 20 unit_1;
  th = 3 unit_1;
  mu = 0.1;
  sigma = 0.5;
  Kf_up = 1.75e-5 unit_2;
  n = 1;
  Voltage_Mem = 0;
  _PI_ = 3.141593 unit_3;
  _F_ = 96485.3321 unit_4;
  KMOLE = 0.001660539 unit_5;
  Kf_Uptake = 1.75e-5 unit_2;
  Kr_Uptake = 0 unit_6;
  Km_Efflux = 69 unit_7;
  Vmax_Efflux has unit_8;
  Kf_dissociation = 0.000448 unit_6;
  Kr_dissociation = 0 unit_2;
  quantity = 0;

  // Assignment rules:
  s_linear_density := 1.5*v_u*(1/v_u_new);
  Tx_B_molecules := PCS_B*400000000000*6.022e23;
  oat1 := OAT1*200000000;
  Tx_U_molecules := PCS_C*400000000000*6.022e23;
  Vmax_Efflux := 1e-5*23418*KMOLE;
  s_skew_density := exp(-((ln(v_u_new) + (-mu))^2*(1/(2*sigma^2))))*(1/(v_u_new*sigma*(2*_PI_)^(1/2)));
  oat_tx := PCS_OAT1*200000000;
  Total := oat_tx + Tx_B_molecules + Tx_U_molecules;

  // Reactions:
  Uptake: OAT1 + PCS_B -> PCS_OAT1; Function_for_Uptake(PCS_B, PCS_OAT1, Kf_Uptake, Kr_Uptake, Mem, OAT1);
  Efflux: PCS_C -> PCS_B; Function_for_Efflux(PCS_C, Km_Efflux, Mem, Vmax_Efflux);
  dissociation: PCS_OAT1 -> OAT1 + PCS_C; Function_for_dissociation(PCS_C, PCS_OAT1, Kf_dissociation, Kr_dissociation, Mem, OAT1);

  // Unit definitions:
  unit length = 0.1 metre;
  unit area = (0.1 metre)^2;
  unit volume = litre;
  unit time = 0.06 second;
  unit substance = 1e-6 mole;
  unit unit_0 = 1e-6 metre / second; unit_0 is "µm/s";
  unit unit_1 = 1e-6 metre; unit_1 is "µm";
  unit unit_2 = litre / (1e-6 mole * second); unit_2 is "l/(µmol*s)";
  unit unit_3 = dimensionless^0; unit_3 is "1";
  unit unit_4 = coulomb / mole; unit_4 is "C/mol";
  unit unit_5 = 1e-21 avogadro; unit_5 is "zAvogadro";
  unit unit_6 = 1 / second; unit_6 is "1/s";
  unit unit_7 = 1e-6 mole / litre; unit_7 is "µmol/l";
  unit unit_8 = 1e-4 mole / (metre^2 * second); unit_8 is "100*µmol/(m²*s)";
end
